<?xml version="1.0"?>
<?xml-stylesheet type="text/xsl" href="http://jsbsim.sourceforge.net/JSBSim.xsl"?>

<fdm_config name="f18" version="2.0" release="ALPHA"
   xmlns:xsi="http://www.w3.org/2001/XMLSchema-instance"
   xsi:noNamespaceSchemaLocation="http://jsbsim.sourceforge.net/JSBSim.xsd">

   <fileheader>
    <author> SammySkycrafts,Mathias Froehlich, StuartC </author>
    <version>1.0</version>
    <description> Models an F/A-18 </description>
   </fileheader>

 <metrics>
   <wingarea  unit="FT2">   400.00 </wingarea>
   <wingspan  unit="FT" >    37.50 </wingspan>
   <wing_incidence unit="DEG"> 2.00 </wing_incidence>
   <chord     unit="FT" >    10.83 </chord>
   <htailarea unit="FT2">    88.06 </htailarea>
   <htailarm  unit="FT" >    22.40 </htailarm>
   <vtailarea  unit="FT2">  104.20 </vtailarea>
   <vtailarm  unit="FT" >    22.40 </vtailarm>
   <location name="AERORP" unit="IN">
     <x>   403.20 </x>
     <y>     0.00 </y>
     <z>     0.00 </z>
   </location>
   <location name="EYEPOINT" unit="IN">
     <x>   3.5 </x>
     <y>     0.00 </y>
     <z>    1.4 </z>
   </location>
   <location name="VRP" unit="IN">
     <x>     0.0 </x>
     <y>     0.0 </y>
     <z>     -10.0 </z>
   </location>
 </metrics>

 <mass_balance>
   <ixx unit="SLUG*FT2">  22040.00 </ixx>
   <iyy unit="SLUG*FT2">  124554.00 </iyy>
   <izz unit="SLUG*FT2">  139382.00 </izz>
   <emptywt unit="LBS" >  23832.00 </emptywt>
   <location name="CG" unit="IN">
     <x>   394.30 </x>
     <y>     0.00 </y>
     <z>   -16.80 </z>
   </location>
   <pointmass name="Payload">
    <description> 20258.80 LBS should bring model up to entered max weight </description>
    <weight unit="LBS"> 10129.40 </weight>
    <location name="POINTMASS" unit="IN">
     <x>   394.30 </x>
     <y>     0.00 </y>
     <z>   -16.80 </z>
   </location>
  </pointmass>
 </mass_balance>

 <propulsion>

   <engine file="F404-GE-402">
    <location unit="IN">
      <x>   612.00 </x>
      <y>   -20.00 </y>
      <z>     0.00 </z>
    </location>
    <orient unit="DEG">
      <pitch>     0.00 </pitch>
       <roll>     0.00 </roll>
        <yaw>     0.00 </yaw>
    </orient>
    <feed> 0 </feed>

    <thruster file="direct">
     <sense> 1 </sense>
     <location unit="IN">
       <x>   612.00 </x>
       <y>   -20.00 </y>
       <z>     0.00 </z>
     </location>
     <orient unit="DEG">
       <pitch>     0.00 </pitch>
        <roll>     0.00 </roll>
         <yaw>     0.00 </yaw>
     </orient>
    </thruster>
  </engine>

   <engine file="F404-GE-402">
    <location unit="IN">
      <x>   612.00 </x>
      <y>    20.00 </y>
      <z>     0.00 </z>
    </location>
    <orient unit="DEG">
      <pitch>     0.00 </pitch>
       <roll>     0.00 </roll>
        <yaw>     0.00 </yaw>
    </orient>
    <feed> 1 </feed>

    <thruster file="direct">
     <sense> 1 </sense>
     <location unit="IN">
       <x>   612.00 </x>
       <y>    20.00 </y>
       <z>     0.00 </z>
     </location>
     <orient unit="DEG">
       <pitch>     0.00 </pitch>
        <roll>     0.00 </roll>
         <yaw>     0.00 </yaw>
     </orient>
    </thruster>
  </engine>

  <tank type="FUEL" number="0">
     <location unit="IN">
       <x>   394.30 </x>
       <y>     0.00 </y>
       <z>   -16.80 </z>
     </location>
     <capacity unit="LBS"> 3836.40 </capacity>
     <contents unit="LBS"> 1918.20 </contents>
  </tank>
  <tank type="FUEL" number="1">
     <location unit="IN">
       <x>   394.30 </x>
       <y>     0.00 </y>
       <z>   -16.80 </z>
     </location>
     <capacity unit="LBS"> 3836.40 </capacity>
     <contents unit="LBS"> 1918.20 </contents>
  </tank>
  <tank type="FUEL" number="2">
     <location unit="IN">
       <x>   394.30 </x>
       <y>     0.00 </y>
       <z>   -16.80 </z>
     </location>
     <capacity unit="LBS"> 3836.40 </capacity>
     <contents unit="LBS"> 1918.20 </contents>
  </tank>

 </propulsion>

 <ground_reactions>

  <contact type="BOGEY" name="NOSE">
    <location unit="IN">
      <x>    87.36 </x>
      <y>     0.00 </y>
      <z>   -80.64 </z>
    </location>
    <static_friction>  0.80 </static_friction>
    <dynamic_friction> 0.50 </dynamic_friction>
    <rolling_friction> 0.02 </rolling_friction>
    <spring_coeff  unit="LBS/FT">     16680.00 </spring_coeff>
    <damping_coeff unit="LBS/FT/SEC"> 8340.00 </damping_coeff>
    <max_steer unit="DEG"> 5.00 </max_steer>
    <brake_group> NONE </brake_group>
    <retractable> 1 </retractable>
  </contact>

  <contact type="BOGEY" name="LEFT_MAIN">
    <location unit="IN">
      <x>   410.08 </x>
      <y>   -40.50 </y>
      <z>   -80.64 </z>
    </location>
    <static_friction>  0.80 </static_friction>
    <dynamic_friction> 0.50 </dynamic_friction>
    <rolling_friction> 0.02 </rolling_friction>
    <spring_coeff  unit="LBS/FT">     55600.00 </spring_coeff>
    <damping_coeff unit="LBS/FT/SEC"> 27800.00 </damping_coeff>
    <max_steer unit="DEG">0</max_steer>
    <brake_group> LEFT </brake_group>
    <retractable> 1 </retractable>
  </contact>

  <contact type="BOGEY" name="RIGHT_MAIN">
    <location unit="IN">
      <x>   410.08 </x>
      <y>    40.50 </y>
      <z>   -80.64 </z>
    </location>
    <static_friction>  0.80 </static_friction>
    <dynamic_friction> 0.50 </dynamic_friction>
    <rolling_friction> 0.02 </rolling_friction>
    <spring_coeff  unit="LBS/FT">     55600.00 </spring_coeff>
    <damping_coeff unit="LBS/FT/SEC"> 27800.00 </damping_coeff>
    <max_steer unit="DEG">0</max_steer>
    <brake_group> RIGHT </brake_group>
    <retractable> 1 </retractable>
  </contact>

  <contact type="STRUCTURE" name="LEFT_WING">
    <location unit="IN">
     <x>   394.30 </x>
     <y>  -225.00 </y>
     <z>   -16.80 </z>
    </location>
   <static_friction>  1 </static_friction>
   <dynamic_friction> 1 </dynamic_friction>
   <spring_coeff unit="LBS/FT">      55600.00 </spring_coeff>
   <damping_coeff unit="LBS/FT/SEC"> 55600.00 </damping_coeff>
  </contact>

  <contact type="STRUCTURE" name="RIGHT_WING">
    <location unit="IN">
     <x>   394.30 </x>
     <y>   225.00 </y>
     <z>   -16.80 </z>
    </location>
   <static_friction>  1 </static_friction>
   <dynamic_friction> 1 </dynamic_friction>
   <spring_coeff unit="LBS/FT">      55600.00 </spring_coeff>
   <damping_coeff unit="LBS/FT/SEC"> 55600.00 </damping_coeff>
  </contact>

 </ground_reactions>

 <system file="Propulsion.xml"/>
 <system file="Aircraftcontrol.xml"/>
 <system file="LandingGear.xml"/>
 <system file="Flaps.xml"/>
 <system file="Speedbrake.xml"/>
 <system file="ArrestorHook.xml"/>
 <system file="Catapult.xml"/>

 <flight_control name="FCS: f18">

 </flight_control>

 <aerodynamics>

  <axis name="LIFT">

    <!-- Lift above 0.85 and below -0.85 is generalised -->
    <function name="aero/force/Lift_alpha">
      <description>Lift due to alpha</description>
      <product>
          <property>aero/qbar-psf</property>
          <property>metrics/Sw-sqft</property>
          <table>
            <independentVar lookup="row">aero/alpha-rad</independentVar>
            <tableData>
              -1.57  0.0000
              -1.22 -0.5806
              -1.05 -0.7823
              -0.88 -0.9033
              -0.73 -0.8431
              -0.67 -2.1077
               0.00  0.5200
               0.54  2.6277
               0.60  1.3630
               0.88  1.0967
               1.05  0.9497
               1.22  0.7050
               1.57  0.0000
            </tableData>
          </table>
          <property>tune/lift/alpha</property>
      </product>
    </function>

    <function name="aero/force/Lift_pitch_rate">
        <description>Lift due to pitch rate</description>
        <product>
          <property>aero/qbar-psf</property>
          <property>metrics/Sw-sqft</property>
          <property>velocities/q-aero-rad_sec</property>
          <property>aero/ci2vel</property>
          <value> 3.7047 </value>
          <property>tune/lift/pitch_rate</property>
        </product>
      </function>

      <function name="aero/force/Lift_alpha_rate">
        <description>Lift due to alpha rate</description>
        <product>
           <property>aero/qbar-psf</property>
           <property>metrics/Sw-sqft</property>
           <property>aero/alphadot-rad_sec</property>
           <property>aero/ci2vel</property>
           <value> 2.6943 </value>
        </product>
      </function>

    <function name="aero/force/Lift_elevator">
       <description>Lift due to Elevator Deflection</description>
       <product>
           <property>aero/qbar-psf</property>
           <property>metrics/Sw-sqft</property>
           <property>fcs/elevator-pos-rad</property>
           <value> 0.5904 </value>
           <property>tune/lift/alpha_rate</property>
       </product>
    </function>

    <function name="aero/force/Lift_flap">
       <description>Delta Lift due to flaps</description>
       <product>
           <property>aero/qbar-psf</property>
           <property>metrics/Sw-sqft</property>
           <property>fcs/flap-pos-deg</property>
           <value> 0.0107 </value>
           <property>tune/lift/flap</property>
       </product>
    </function>


  </axis>

  <axis name="DRAG">

    <!-- CD0 is based on fuselage, wing, horizontal- en vertical tail -->
    <!-- Antennas, struts and wires are not taken into account        -->
    <!-- CD for gear (fixed and retractable) is defined below         -->
    <function name="aero/force/Drag_minimum">
       <description>Minimum drag</description>
       <product>
          <property>aero/qbar-psf</property>
          <property>metrics/Sw-sqft</property>
          <value> 0.0131 </value>
          <property>tune/drag/minimum</property>
       </product>
    </function>

    <function name="aero/force/Drag_alpha">
       <description>Drag due to alpha</description>
       <product>
          <property>aero/qbar-psf</property>
          <property>metrics/Sw-sqft</property>
          <table>
            <independentVar lookup="row">aero/alpha-rad</independentVar>
            <tableData>
             -1.57    1.4088
             -0.54    0.2078
              0.00    0.0000
              0.54    0.2078
              1.57    1.4088
            </tableData>
          </table>
       </product>
    </function>

    <function name="aero/force/Drag_induced">
       <description>Induced drag</description>
         <product>
           <property>aero/qbar-psf</property>
           <property>metrics/Sw-sqft</property>
           <property>aero/cl-squared</property>
           <value> 0.0948 </value>
           <property>tune/drag/induced</property>
         </product>
    </function>

    <function name="aero/force/Drag_mach">
       <description>Drag due to mach</description>
        <product>
          <property>aero/qbar-psf</property>
          <property>metrics/Sw-sqft</property>
          <sum>
            <product>
              <value>0.174</value>
              <pow>
                <property>velocities/mach</property>
                <value>4</value>
              </pow>
            </product>
            <product>
              <value>-0.116</value>
              <pow>
                <property>velocities/mach</property>
                <value>2</value>
              </pow>
            </product>
          </sum>
          <property>tune/drag/mach</property>
        </product>
    </function>

    <function name="aero/force/Drag_beta">
       <description>Drag due to sideslip</description>
       <product>
          <property>aero/qbar-psf</property>
          <property>metrics/Sw-sqft</property>
          <table>
            <independentVar lookup="row">aero/beta-rad</independentVar>
            <tableData>
              -1.57    1.2300
              -0.26    0.0500
               0.00    0.0000
               0.26    0.0500
               1.57    1.2300
            </tableData>
          </table>
          <property>tune/drag/beta</property>
       </product>
    </function>

    <function name="aero/force/Drag_elevator">
       <description>Drag due to Elevator Deflection</description>
       <product>
           <property>aero/qbar-psf</property>
           <property>metrics/Sw-sqft</property>
           <abs><property>fcs/elevator-pos-rad</property></abs>
           <value> 0.0400 </value>
           <property>tune/drag/elevator</property>
       </product>
    </function>

    <function name="aero/force/Drag_gear">
       <description>Drag due to gear</description>
         <product>
           <property>aero/qbar-psf</property>
           <property>metrics/Sw-sqft</property>
           <property>gear/gear-pos-norm</property>
           <value> 0.0200 </value>
           <property>tune/drag/gear</property>
         </product>
    </function>

    <function name="aero/force/Drag_flap">
       <description>Drag due to flaps</description>
         <product>
           <property>aero/qbar-psf</property>
           <property>metrics/Sw-sqft</property>
           <property>fcs/flap-pos-deg</property>
           <value> 0.0023 </value>
           <property>tune/drag/flap</property>
         </product>
    </function>


    <function name="aero/force/Drag_speedbrake">
       <description>Drag due to speedbrakes</description>
         <product>
           <property>aero/qbar-psf</property>
           <property>metrics/Sw-sqft</property>
           <property>fcs/speedbrake-pos-norm</property>
           <value> 0.0800 </value>
           <property>tune/drag/speedbrake</property>
         </product>
    </function>

  </axis>

  <axis name="SIDE">

    <function name="aero/force/Side_beta">
       <description>Side force due to beta</description>
       <product>
           <property>aero/qbar-psf</property>
           <property>metrics/Sw-sqft</property>
           <property>aero/beta-rad</property>
           <value> -1.2096 </value>
           <property>tune/side/beta</property>
       </product>
    </function>
    <function name="aero/force/Side_roll_rate">
       <description>Side force due to roll rate</description>
       <product>
           <property>aero/qbar-psf</property>
           <property>metrics/Sw-sqft</property>
           <property>aero/bi2vel</property>
           <property>velocities/p-aero-rad_sec</property>
           <table>
             <independentVar lookup="row">aero/Re</independentVar>
             <tableData>
                14561726   0.4848
                16017897   0.0384
                21842586   0.0171
                29150180   0.0096
             </tableData>
           </table>
           <property>tune/side/roll_rate</property>
       </product>
    </function>

    <function name="aero/force/Side_yaw_rate">
       <description>Side force due to yaw rate</description>
       <product>
           <property>aero/qbar-psf</property>
           <property>metrics/Sw-sqft</property>
           <property>aero/bi2vel</property>
           <property>velocities/r-aero-rad_sec</property>
           <value> 1.4451 </value>
           <property>tune/side/yaw_rate</property>
       </product>
    </function>

    <function name="aero/force/Side_rudder">
       <description>Side force due to rudder</description>
       <product>
           <property>aero/qbar-psf</property>
           <property>metrics/Sw-sqft</property>
           <property>fcs/rudder-pos-rad</property>
           <value> 0.3664 </value>
           <property>tune/side/rudder</property>
       </product>
    </function>

  </axis>

  <axis name="PITCH">

    <function name="aero/moment/Pitch_alpha">
       <description>Pitch moment due to alpha</description>
       <product>
           <property>aero/qbar-psf</property>
           <property>metrics/Sw-sqft</property>
           <property>metrics/cbarw-ft</property>
           <property>aero/alpha-rad</property>
           <value> -0.2884 </value>
           <property>tune/pitch/alpha</property>
       </product>
    </function>

    <function name="aero/moment/Pitch_elevator">
       <description>Pitch moment due to elevator</description>
       <product>
          <property>aero/qbar-psf</property>
          <property>metrics/Sw-sqft</property>
          <property>metrics/cbarw-ft</property>
          <property>fcs/elevator-pos-rad</property>
          <table>
            <independentVar lookup="row">velocities/mach</independentVar>
            <tableData>
              0.0    -1.1758
              2.0    -0.2939
            </tableData>
          </table>
          <property>tune/pitch/elevator</property>
       </product>
    </function>

    <function name="aero/moment/Pitch_damp">
       <description>Pitch moment due to pitch rate</description>
       <product>
           <property>aero/qbar-psf</property>
           <property>metrics/Sw-sqft</property>
           <property>metrics/cbarw-ft</property>
           <property>aero/ci2vel</property>
           <property>velocities/q-aero-rad_sec</property>
           <value> -7.6617 </value>
           <property>tune/pitch/damp</property>
       </product>
    </function>

    <function name="aero/moment/Pitch_alphadot">
       <description>Pitch moment due to alpha rate</description>
       <product>
           <property>aero/qbar-psf</property>
           <property>metrics/Sw-sqft</property>
           <property>metrics/cbarw-ft</property>
           <property>aero/ci2vel</property>
           <property>aero/alphadot-rad_sec</property>
           <value> -5.5721 </value>
           <property>tune/pitch/alphadot</property>
       </product>
    </function>

  </axis>

  <axis name="ROLL">

    <function name="aero/moment/Roll_beta">
       <description>Roll moment due to beta</description>
       <product>
           <property>aero/qbar-psf</property>
           <property>metrics/Sw-sqft</property>
           <property>metrics/bw-ft</property>
           <property>aero/beta-rad</property>
           <property>fcs/gear-no-wow</property>
           <table>
             <independentVar lookup="row">aero/alpha-rad</independentVar>
             <independentVar lookup="column">aero/Re</independentVar>
             <tableData>
                         14561726 16017897 21842586 29150180
                 -0.0349  -0.7632  -0.0598  -0.0262  -0.0144
                  0.3491  -0.7632  -0.0598  -0.0262  -0.0144
             </tableData>
           </table>
           <property>tune/roll/beta</property>
       </product>
    </function>

    <function name="aero/moment/Roll_damp">
       <description>Roll moment due to roll rate</description>
       <product>
           <property>aero/qbar-psf</property>
           <property>metrics/Sw-sqft</property>
           <property>metrics/bw-ft</property>
           <property>aero/bi2vel</property>
           <property>velocities/p-aero-rad_sec</property>
           <value> -0.2847 </value>
           <property>tune/roll/damp</property>
       </product>
    </function>

    <function name="aero/moment/Roll_yaw">
       <description>Roll moment due to yaw rate</description>
       <product>
           <property>aero/qbar-psf</property>
           <property>metrics/Sw-sqft</property>
           <property>metrics/bw-ft</property>
           <property>aero/bi2vel</property>
           <property>velocities/r-aero-rad_sec</property>
           <table>
             <independentVar lookup="row">aero/alpha-rad</independentVar>
             <independentVar lookup="column">aero/Re</independentVar>
             <tableData>
                         14561726 16017897 21842586 29150180
                 -0.0349   0.0574   0.0574   0.0574   0.0574
                  0.3491   6.5306   0.4824   0.4319   0.4319
             </tableData>
           </table>
           <property>tune/roll/yaw</property>
       </product>
    </function>

    <function name="aero/moment/Roll_aileron">
       <description>Roll moment due to aileron</description>
       <product>
          <property>aero/qbar-psf</property>
          <property>metrics/Sw-sqft</property>
          <property>metrics/bw-ft</property>
          <property>fcs/left-aileron-pos-rad</property>
           <table>
            <independentVar lookup="row">velocities/mach</independentVar>
            <tableData>
              0.0    0.1200
              2.0    0.0300
            </tableData>
          </table>
          <property>tune/roll/aileron</property>
       </product>
    </function>

    <function name="aero/moment/Roll_rudder">
       <description>Roll moment due to rudder</description>
       <product>
           <property>aero/qbar-psf</property>
           <property>metrics/Sw-sqft</property>
           <property>metrics/bw-ft</property>
           <property>fcs/rudder-pos-rad</property>
           <value> 0.0100 </value>
           <property>tune/roll/rudder</property>
       </product>
    </function>

  </axis>

  <axis name="YAW">

    <!-- Stall initiator -->
    <function name="aero/moment/Yaw_alpha">
       <description>Yaw moment due to alpha</description>
       <product>
           <property>aero/qbar-psf</property>
           <property>metrics/Sw-sqft</property>
           <property>metrics/bw-ft</property>
           <property>aero/alpha-rad</property>
           <property>fcs/gear-no-wow</property>
           <table>
             <independentVar lookup="row">aero/beta-rad</independentVar>
             <independentVar lookup="column">aero/Re</independentVar>
             <tableData>
                         14561726 16017897
                 -0.3491  -1.0000   0.0000
                  0.3491   1.0000   0.0000
             </tableData>
           </table>
           <property>tune/yaw/alpha</property>
       </product>
    </function>

    <function name="aero/moment/Yaw_beta">
       <description>Yaw moment due to beta</description>
       <product>
           <property>aero/qbar-psf</property>
           <property>metrics/Sw-sqft</property>
           <property>metrics/bw-ft</property>
           <property>aero/beta-rad</property>
           <value> 0.3472 </value>
           <property>tune/yaw/beta</property>
       </product>
    </function>

    <function name="aero/moment/Yaw_roll_rate">
       <description>Yaw moment due to roll rate</description>
       <product>
           <property>aero/qbar-psf</property>
           <property>metrics/Sw-sqft</property>
           <property>metrics/bw-ft</property>
           <property>aero/bi2vel</property>
           <property>velocities/p-rad_sec</property>
           <table>
             <independentVar lookup="row">aero/Re</independentVar>
             <tableData>
                14561726  -0.2896
                16017897  -0.0230
                21842586  -0.0102
                29150180  -0.0057
             </tableData>
           </table>
           <property>tune/yaw/roll_rate</property>
       </product>
    </function>

    <function name="aero/moment/Yaw_damp">
       <description>Yaw moment due to yaw rate</description>
       <product>
           <property>aero/qbar-psf</property>
           <property>metrics/Sw-sqft</property>
           <property>metrics/bw-ft</property>
           <property>aero/bi2vel</property>
           <property>velocities/r-aero-rad_sec</property>
           <value> -0.4389 </value>
           <property>tune/yaw/damp</property>
       </product>
    </function>

    <function name="aero/moment/Yaw_rudder">
       <description>Yaw moment due to rudder</description>
       <product>
           <property>aero/qbar-psf</property>
           <property>metrics/Sw-sqft</property>
           <property>metrics/bw-ft</property>
           <property>fcs/rudder-pos-rad</property>
           <value> -0.2189 </value>
           <property>tune/yaw/rudder</property>
       </product>
    </function>

    <function name="aero/moment/Yaw_aileron">
       <description>Adverse yaw</description>
       <product>
           <property>aero/qbar-psf</property>
           <property>metrics/Sw-sqft</property>
           <property>metrics/bw-ft</property>
           <property>fcs/left-aileron-pos-rad</property>
           <value> 0.0000 </value>
           <property>tune/yaw/aileron</property>
       </product>
    </function>

  </axis>

 </aerodynamics>

 <external_reactions>

  <force name="hook" frame="BODY">
   <location unit="FT">
    <x> 50.96 </x>
    <y> 0 </y>
    <z> -1.12</z>
    <x> 23.601 </x>
    <y> 0 </y>
    <z> -1.1334</z>
   </location>
   <direction>
    <x>-0.9995</x>
    <y> 0 </y>
    <z> 0.01 </z>
   </direction>
  </force>

  <force name="catapult" frame="BODY">
   <location unit="IN">
    <x> 87.36 </x>
    <y> 0 </y>
    <z> -80.64 </z>
   </location>
   <direction>
    <x> 1 </x>
    <y> 0 </y>
    <z> 0 </z>
   </direction>
  </force>

 </external_reactions>

</fdm_config>
